# LAMMPS输入文件示例：使用Martini 3粗粒化力场对PDMS进行弛豫
# -----------------------------------------------------
# 1. 初始化设置
# -----------------------------------------------------
units               real
dimension           3
boundary            p p s
atom_style          full

# 读取包含PDMS分子结构的data文件
read_data           bad_pdms_50_box_ca.data
mass                1 72
change_box          all z delta -10 10
# fix                 xwalls all wall/reflect xlo EDGE xhi EDGE
# fix                 ywalls all wall/reflect ylo EDGE yhi EDGE
variable            linear equal vdisplace(117.2315,-0.0006)
fix                 zwallslo all wall/reflect zlo EDGE
fix                 zwallshi all wall/reflect zhi v_linear
# write_data          pdms_tmp.data
# -----------------------------------------------------
# 2. 力场参数设置（Martini 3参数）
# -----------------------------------------------------
# 定义非键相互作用（示例：Lennard-Jones势，截断距离可参考Martini 3常用取值）
# soft 势清洗阶段
# pair_style soft 10.0
# pair_coeff * * 0.3 6.0
# neighbor 1 bin
# neigh_modify every 1 delay 0 check yes
# fix relax all nve
# run 10000
# unfix relax

pair_style lj/cut   12.0
special_bonds       lj 0.0 0.0 0.5
pair_coeff          1 1 0.7337 5.1
# 定义键、角、二面角势（示例参数，实际参数请参考相关文献）
bond_style          harmonic
bond_coeff          1 13.243 4.48
angle_style         harmonic
angle_coeff         1 5.48 86.0
dihedral_style      harmonic
dihedral_coeff      1 0.3346  1  1
# -----------------------------------------------------
# 3. 邻域列表设置
# -----------------------------------------------------
neigh_modify    one 1000
neighbor        1 bin
neigh_modify    delay 0 every 1 check yes

# -----------------------------------------------------
# 4. 能量最小化与预平衡
# -----------------------------------------------------

minimize        1.0e-4 1.0e-6 1000 10000
# fix             1 all npt temp 300.0 300.0 100.0 x 1.0 1.0 1000 y 1.0 1.0 1000 couple none
fix             1 all nvt temp 300.0 300.0 100.0
timestep        1
thermo_style    custom step temp press density vol
thermo          10000
dump            traj all custom 1000 dump.pdms.lammpstrj id type xu yu zu
reset_timestep  0
run             100000
unfix           1
unfix           zwallshi

fix             zwallshi all wall/reflect zhi EDGE
fix             2 all nvt temp 300.0 300.0 100.0
timestep        1
thermo_style    custom step temp press density vol
thermo          10000
run             100000
unfix           2
# -----------------------------------------------------
# 6. 数据输出
# -----------------------------------------------------


# # 写出最终体系数据文件
write_data      pdms_ca_out.data
replicate       1 3 1
write_data      pdms_ca_rep.data
