units           real
dimension       3
boundary        p p p
atom_style      full

read_data       PDMS_100.data


pair_style      none

bond_style      harmonic
bond_coeff      1 27.486 4.48
angle_style     none
dihedral_style  none

neigh_modify    one 100
neighbor        1 bin
neigh_modify    delay 0 every 1 check yes

minimize        1.0e-4 1.0e-6 1000 10000

fix             equil all nvt temp 300.0 300.0 100.0
timestep        10
thermo_style    one
thermo          10000
run             50000
unfix           equil


fix             prod all nve
variable        d_end equal "sqrt((x[1]-x[100])^2 + (y[1]-y[100])^2 + (z[1]-z[100])^2)"
compute         rg all gyration
fix             avg all ave/time 2000000 800 2000000000 c_rg v_d_end file avg.txt

thermo_style    custom step temp pe ke etotal c_rg v_d_end
thermo          2000000

dump            traj all custom 2000000 dump.pdms.lammpstrj id type x y z

run             2000000000
unfix           prod

write_data      pdms_out.data
