# LAMMPS输入文件示例：使用Martini 3粗粒化力场计算PDMS的均方回转半径
# -----------------------------------------------------
# 1. 初始化设置
# -----------------------------------------------------
units               real
dimension           3
boundary            s s s
atom_style          full

# 读取包含PDMS分子结构的data文件
read_data           bad_pdms_50_box_nvt.data
# variable            linear equal vdisplace(171,-0.0006)
# fix                 xwallslo all wall/reflect xlo EDGE
# fix                 ywallslo all wall/reflect ylo EDGE
# fix                 zwallslo all wall/reflect zlo EDGE
# fix                 xwallshi all wall/reflect xhi v_linear
# fix                 ywallshi all wall/reflect yhi v_linear
# fix                 zwallshi all wall/reflect zhi v_linear
# -----------------------------------------------------
# 2. 力场参数设置（Martini 3参数）
# -----------------------------------------------------
# 定义非键相互作用（示例：Lennard-Jones势，截断距离可参考Martini 3常用取值）
pair_style lj/cut   12.0
special_bonds       lj 0.0 0.0 0.5
pair_coeff          1 1 0.7337 5.1
# 定义键、角、二面角势（示例参数，实际参数请参考相关文献）
bond_style          harmonic
bond_coeff          1 13.243 4.48
angle_style         harmonic
angle_coeff         1 5.48 86.0
dihedral_style      harmonic
dihedral_coeff      1 0.3346  1  1
# -----------------------------------------------------
# 3. 邻域列表设置
# -----------------------------------------------------
neigh_modify        one 1000
neighbor            0.5 bin
neigh_modify        delay 0 every 1 check yes

# -----------------------------------------------------
# 4. 能量最小化与预平衡
# -----------------------------------------------------
minimize            1.0e-4 1.0e-6 10000 100000
velocity            all create 300 4928459
compute             pressperatom all stress/atom NULL
compute             peperatom all pe/atom
compute             pairperatom all pe/atom pair
compute             bondperatom all pe/atom bond
compute             angleperatom all pe/atom angle
compute             dihedralperatom all pe/atom dihedral
# npt系综下驰豫
dump                min all custom 10000 dump.pdms_min.lammpstrj id type x y z vx vy vz c_pressperatom[1] c_pressperatom[2] c_pressperatom[3] c_peperatom c_pairperatom c_bondperatom c_angleperatom c_dihedralperatom
fix                 3 all nvt temp 300 300 50
thermo_style        custom step temp density press etotal pxx pyy pzz lx ly lz
thermo              10000
run                 5000000
unfix               3
undump              min
write_data          pdms50_nvt.data
# # -----------------------------------------------------
# # 5. npt下拉伸
# # -----------------------------------------------------
# # 计算应力
# reset_timestep      0
# timestep            1
# compute             2 all reduce sum c_pressperatom[1] c_pressperatom[2]
# variable            CorVol equal ly*lx*lz
# variable            sigmaxx equal c_2[1]/(v_CorVol*10)
# variable            px equal -pxx/10
# # 计算应变值
# variable            tmp equal "lx"
# variable            L0 equal ${tmp}
# variable            strain equal "(lx - v_L0)/v_L0"
# #dump输出
# dump                1 all custom 10000 dump.pdms.lammpstrj id type x y z vx vy vz c_pressperatom[1] c_pressperatom[2] c_pressperatom[3] c_peperatom c_pairperatom c_bondperatom c_angleperatom c_dihedralperatom
# # 设置npt系综
# fix                 1 all npt temp 300 300 50 y 0 0 2000 z 0 0 2000 drag 2
# # deform拉伸，x方向
# fix                 2 all deform 1 x erate 1e-7 units box remap x
# # 热力学输出
# # fix                 ave_sxx all ave/time 100 100 10000 v_strain v_sigmaxx v_px file stress_profile.dat ave one
# # fix                 ave_sxx2 all ave/time 1000 200 200000 v_strain v_sigmaxx v_px file stress_profile2.dat ave one
# # fix                 ave_sxx3 all ave/time 200 1000 200000 v_strain v_sigmaxx v_px file stress_profile3.dat ave one
# # fix                 ave_sxx4 all ave/time 1000 1000 1000000 v_strain v_sigmaxx v_px file stress_profile4.dat ave one
# fix                 origin all print 100 "${strain} ${sigmaxx} ${px}" file origin100.txt screen no
# # thermo_style        custom step temp v_strain v_sigmaxx density press pxx pyy pzz lx ly lz etotal
# thermo_style        custom step temp pe ke etotal evdwl ecoul epair ebond eangle edihed eimp emol elong etail enthalpy ecouple econserve
# thermo              10000

# # 启动模拟，n步
# run                 30000000
